*Heading
** Job name: UMAT_Material Model name: Model-1
** Generated by: Abaqus/CAE 2021
*Preprint, echo=NO, model=NO, history=NO, contact=NO
**
** PARTS
**
*Part, name=Part-1
*Node
      1,           5.,           5.,          20.
      2,           5.,   3.33333325,          20.
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*Element, type=C3D8
 1,  45,  46,  50,  49,   1,   2,   6,   5
 2,  46,  47,  51,  50,   2,   3,   7,   6
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*Nset, nset=Set-1, generate
   1,  176,    1
*Elset, elset=Set-1, generate
  1,  90,   1
** Section: Section-1
*Solid Section, elset=Set-1, material=UMAT_Material
,
*End Part
**
**
** ASSEMBLY
**
*Assembly, name=Assembly
**
*Instance, name=Part-1-1, part=Part-1
*End Instance
**
*Nset, nset=Set-1, instance=Part-1-1
   1,   2,   3,   4,  45,  46,  47,  48,  89,  90,  91,  92, 133, 134, 135, 136
*Elset, elset=Set-1, instance=Part-1-1
  1,  2,  3, 31, 32, 33, 61, 62, 63
*Elset, elset=_Surf-1_S6, internal, instance=Part-1-1, generate
  1,  88,   3
*Surface, type=ELEMENT, name=Surf-1
_Surf-1_S6, S6
*Elset, elset=_Surf-2_S6, internal, instance=Part-1-1, generate
  1,  88,   3
*Surface, type=ELEMENT, name=Surf-2
_Surf-2_S6, S6
*End Assembly
**
** MATERIALS
**
*Material, name=Abaqus_Material
*Elastic
210000., 0.3
*Material, name=UMAT_Material
*User Material, constants=2
210000., 0.3
**
** BOUNDARY CONDITIONS
**
** Name: Fix Type: Symmetry/Antisymmetry/Encastre
*Boundary
Set-1, ENCASTRE
** ----------------------------------------------------------------
**
** STEP: Step-1
**
*Step, name=Step-1, nlgeom=NO
*Static, direct
0.1, 1.,
**
** LOADS
**
** Name: Load   Type: Pressure
*Dsload
Surf-2, P, 10.
**
** OUTPUT REQUESTS
**
*Restart, write, frequency=0
**
** FIELD OUTPUT: F-Output-1
**
*Output, field, variable=PRESELECT
**
** HISTORY OUTPUT: H-Output-1
**
*Output, history, variable=PRESELECT
*End Step
